// SBML level 3 version 1

function KL_26290(S, Km, kcat_Km, kcat, E)
  kcat*E*S/(Km + S);
end

function KL_26291(Km, kcat_Km, kcat, E, S)
  kcat*E*S/(Km + S);
end

function KL_44091(B, Km)
  NaN;
end

function KL_45367(Act, Km)
  NaN;
end

function KL_45393(E, Km, kcat, kcat_Km, A)
  E*kcat*A/(Km + A);
end

function KL_46263(Act, A, Vmax, M, Km)
  Vmax*A/(Km + A);
end

function KL_46260(Km, M, A, Vmax)
  Vmax*A/(Km + A);
end

function KL_46560(Vmax, Km, A)
  NaN;
end

function KL_47202(Vmax, A, Km)
  Vmax*A/(Km + A);
end

function KL_47201(A, Vmax, Km)
  Vmax*A/(Km + A);
end

function KL_14785(E, A, Km, kcat, kcat_Km)
  E*kcat*A/(Km + A);
end

function KL_14792(kcat_Km, kcat, E, A, Km)
  E*kcat*A/(Km + A);
end

function KL_33647(Km, kcat_Km, Activity, A, B)
  NaN;
end

function KL_33653(Km, kcat_Km, A, Activity, B)
  NaN;
end

function KL_50494(Ki)
  NaN;
end

function KL_50491(S, E, Km, Vmax)
  Vmax*S/(S + Km);
end

function KL_50493(Km, Vmax, S)
  Vmax*S/(S + Km);
end

function KL_50492(S, Vmax, Km)
  Vmax*S/(S + Km);
end

function KL_48027(A, Vmax, Km)
  NaN;
end

function KL_49017(Ki, C, I)
  NaN;
end

function KL_49018(I, C, Ki)
  NaN;
end

function KL_49019(Ki, I, A)
  NaN;
end

function KL_49013(A, Ki, I)
  NaN;
end

function KL_49014(A, I, Ki)
  NaN;
end

function KL_48034(A, Km)
  NaN;
end

function KL_48036(Km, A)
  NaN;
end

function KL_48033(Km, A, Vmax)
  Vmax*A/(Km + A);
end

function KL_48035(A, Km)
  NaN;
end

function KL_48994(Km, C)
  NaN;
end

function KL_48993(Km)
  NaN;
end

function KL_49004(Km)
  NaN;
end

function KL_49063(S, Km)
  NaN;
end

function KL_49064(S, Km)
  NaN;
end

function KL_48020(Km, Vmax, A)
  NaN;
end

function KL_48427(Vmax, Km, A, Spec_Act)
  NaN;
end

function KL_48431(A, IC_50)
  NaN;
end

function KL_48996(Km, C)
  NaN;
end

function KL_49001(Km, C)
  NaN;
end

function KL_49003(Km, C)
  NaN;
end

function KL_48997(C, Km)
  NaN;
end

function KL_48999(C, Km)
  NaN;
end

function KL_49002(C, Km)
  NaN;
end

function KL_48995(Km, C)
  NaN;
end

function KL_48998(C, Km)
  NaN;
end

function KL_49000(Km)
  NaN;
end

function KL_49159(Vmax, S, Km)
  Vmax*S/(S + Km);
end

function KL_49160(S, Vmax, Km)
  Vmax*S/(S + Km);
end

model cy3sabiork_S2()
  // SABIOmdl08Jun2016039_galactose_metabolism
  // This model has been created with the help of the SABIO-RK Database (http://sabio.h-its.org/) (c) 2005-2016 HITS gGmbH http://www.h-its.org
  // To cite SABIO-RK Database, please use "http://www.ncbi.nlm.nih.gov/pubmed/22102587"
  // SABIO-RK - database for biochemical reaction kinetics. Wittig U, Kania R, Golebiewski M, Rey M, Shi L, Jong L, Algaa E, Weidemann A, Sauer-Danzwith H, Mir S, Krebs O, Bittkowski M, Wetsch E, Rojas I, Mueller W. Nucleic Acids Res. 2012;40(Database issue)790-6

  // Compartments:
  compartment compart_Cell;
  compartment compart_cytosol;
  compartment compart_lysosome;

  // Species:
  species SPC_34_Cell in compart_Cell = 1; SPC_34_Cell is "ATP";  // CHEBI:15422 CHEBI:30616 kegg.compound:C00002
  species SPC_1661_Cell in compart_Cell = 1; SPC_1661_Cell is "D-Galactose";  // CHEBI:4139 CHEBI:12936 kegg.compound:C00124
  species SPC_35_Cell in compart_Cell = 1; SPC_35_Cell is "ADP";  // CHEBI:16761 kegg.compound:C00008
  species SPC_1381_Cell in compart_Cell = 1; SPC_1381_Cell is "alpha-D-Galactose 1-phosphate";  // CHEBI:17973 kegg.compound:C00446
  species ENZ_148448_Cell in compart_Cell = 1; ENZ_148448_Cell is "galactokinase(Enzyme) wildtype His-tagged";  // uniprot:P51570
  species ENZ_148453_Cell in compart_Cell = 1; ENZ_148453_Cell is "galactokinase(Enzyme) wildtype His-tagged";  // uniprot:P51570
  species SPC_39_Cell in compart_Cell = 1; SPC_39_Cell is "H+";  // CHEBI:15378 kegg.compound:C00080
  species SPC_1262_Cell in compart_Cell = 1; SPC_1262_Cell is "NADPH";  // CHEBI:16474 kegg.compound:C00005
  species SPC_1263_Cell in compart_Cell = 1; SPC_1263_Cell is "NADP+";  // CHEBI:18009 CHEBI:25523 CHEBI:44409 kegg.compound:C00006
  species SPC_2311_Cell in compart_Cell = 1; SPC_2311_Cell is "Galactitol";  // CHEBI:16813 kegg.compound:C01697
  species ENZ_250106_Cell in compart_Cell = 1; ENZ_250106_Cell is "alcohol dehydrogenase (NADP+)(Enzyme) wildtype II";
  species ENZ_257447_Cell in compart_Cell = 1; ENZ_257447_Cell is "galactokinase(Enzyme) wildtype rGALK";
  species SPC_3919_Cell in compart_Cell = 1; SPC_3919_Cell is "UDPgalactose";  // CHEBI:18307 kegg.compound:C00052
  species SPC_3918_Cell in compart_Cell = 1; SPC_3918_Cell is "UDPglucose";  // CHEBI:18066 kegg.compound:C00029
  species ENZ_257582_Cell in compart_Cell = 1; ENZ_257582_Cell is "UDP-glucose 4-epimerase(Enzyme) wildtype";  // uniprot:Q14376
  species SPC_1283_Cell in compart_Cell = 1; SPC_1283_Cell is "UDP-D-galactose";  // CHEBI:18307 kegg.compound:C00052
  species SPC_1277_Cell in compart_Cell = 1; SPC_1277_Cell is "UDP-D-glucose";  // CHEBI:18066 kegg.compound:C00029
  species ENZ_262669_Cell in compart_Cell = 1; ENZ_262669_Cell is "UDP-glucose 4-epimerase(Enzyme) wildtype GALE";
  species SPC_37_Cell in compart_Cell = 1; SPC_37_Cell is "NAD+";  // CHEBI:13389 CHEBI:15846 CHEBI:44215 kegg.compound:C00003
  species ENZ_262657_Cell in compart_Cell = 1; ENZ_262657_Cell is "UDP-glucose 4-epimerase(Enzyme) wildtype GALE";
  species SPC_40_Cell in compart_Cell = 1; SPC_40_Cell is "H2O";  // CHEBI:15377 kegg.compound:C00001
  species SPC_28371_Cell in compart_Cell = 1; SPC_28371_Cell is "4-Methylumbelliferyl-alpha-D-galactoside";
  species SPC_90_Cell in compart_Cell = 1; SPC_90_Cell is "alpha-D-Galactose";  // CHEBI:28061 kegg.compound:C00984
  species SPC_6439_Cell in compart_Cell = 1; SPC_6439_Cell is "4-Methylumbelliferone";  // CHEBI:17224 kegg.compound:C03081
  species ENZ_264446_Cell in compart_Cell = 1; ENZ_264446_Cell is "alpha-galactosidase(Enzyme) wildtype";  // uniprot:P06280
  species ENZ_268279_Cell in compart_Cell = 1; ENZ_268279_Cell is "alpha-galactosidase(Enzyme) wildtype isoenzyme B";  // uniprot:P17050
  species ENZ_268274_Cell in compart_Cell = 1; ENZ_268274_Cell is "alpha-galactosidase(Enzyme) wildtype isoenzyme A";  // uniprot:P06280
  species SPC_1661_cytosol in compart_cytosol = 1; SPC_1661_cytosol is "D-Galactose";  // CHEBI:4139 CHEBI:12936 kegg.compound:C00124
  species SPC_34_cytosol in compart_cytosol = 1; SPC_34_cytosol is "ATP";  // CHEBI:15422 CHEBI:30616 kegg.compound:C00002
  species SPC_35_cytosol in compart_cytosol = 1; SPC_35_cytosol is "ADP";  // CHEBI:16761 kegg.compound:C00008
  species SPC_1381_cytosol in compart_cytosol = 1; SPC_1381_cytosol is "alpha-D-Galactose 1-phosphate";  // CHEBI:17973 kegg.compound:C00446
  species ENZ_76988_cytosol in compart_cytosol = 1; ENZ_76988_cytosol is "galactokinase(Enzyme) wildtype His-tagged";  // uniprot:P51570
  species ENZ_77023_cytosol in compart_cytosol = 1; ENZ_77023_cytosol is "galactokinase(Enzyme) wildtype His-tagged";  // uniprot:P51570
  species SPC_1450_Cell in compart_Cell = 1; SPC_1450_Cell is "D-Glucose 1-phosphate";  // CHEBI:16077 kegg.compound:C00103
  species ENZ_190147_Cell in compart_Cell = 1; ENZ_190147_Cell is "UDP-glucose---hexose-1-phosphate uridylyltransferase(Enzyme) wildtype";  // uniprot:P07902
  species ENZ_190177_Cell in compart_Cell = 1; ENZ_190177_Cell is "UDP-glucose---hexose-1-phosphate uridylyltransferase(Enzyme) wildtype";  // uniprot:P07902
  species SPC_40_lysosome in compart_lysosome = 1; SPC_40_lysosome is "H2O";  // CHEBI:15377 kegg.compound:C00001
  species SPC_28371_lysosome in compart_lysosome = 1; SPC_28371_lysosome is "4-Methylumbelliferyl-alpha-D-galactoside";
  species SPC_90_lysosome in compart_lysosome = 1; SPC_90_lysosome is "alpha-D-Galactose";  // CHEBI:28061 kegg.compound:C00984
  species SPC_6439_lysosome in compart_lysosome = 1; SPC_6439_lysosome is "4-Methylumbelliferone";  // CHEBI:17224 kegg.compound:C03081
  species ENZ_286864_lysosome in compart_lysosome = 1; ENZ_286864_lysosome is "alpha-galactosidase(Enzyme) wildtype";
  species SPC_5010_lysosome in compart_lysosome = 1; SPC_5010_lysosome is "myo-Inositol";  // CHEBI:17268 CHEBI:24848 kegg.compound:C00137
  species ENZ_286848_lysosome in compart_lysosome = 1; ENZ_286848_lysosome is "alpha-galactosidase(Enzyme) wildtype";
  species ENZ_286858_lysosome in compart_lysosome = 1; ENZ_286858_lysosome is "alpha-galactosidase(Enzyme) wildtype";
  species ENZ_286853_lysosome in compart_lysosome = 1; ENZ_286853_lysosome is "alpha-galactosidase(Enzyme) wildtype";
  species ENZ_273087_Cell in compart_Cell = 1; ENZ_273087_Cell is "alpha-N-acetylgalactosaminidase(Enzyme) wildtype";
  species SPC_1298_Cell in compart_Cell = 1; SPC_1298_Cell is "alpha-D-Glucose 1-phosphate";  // CHEBI:29042 kegg.compound:C00103
  species SPC_24_Cell in compart_Cell = 1; SPC_24_Cell is "alpha-D-Glucose 6-phosphate";  // CHEBI:17665 kegg.compound:C00668
  species SPC_1452_Cell in compart_Cell = 1; SPC_1452_Cell is "alpha-D-Glucose 1,6-bisphosphate";  // CHEBI:18148 kegg.compound:C01231
  species ENZ_278816_Cell in compart_Cell = 1; ENZ_278816_Cell is "phosphoglucomutase(Enzyme) wildtype PGM1";
  species SPC_6561_Cell in compart_Cell = 1; SPC_6561_Cell is "2,3-Bisphosphoglycerate";  // CHEBI:19324 kegg.compound:C03339
  species ENZ_278821_Cell in compart_Cell = 1; ENZ_278821_Cell is "phosphoglucomutase(Enzyme) wildtype PGM2";
  species SPC_1337_Cell in compart_Cell = 1; SPC_1337_Cell is "alpha-D-Ribose 1-phosphate";  // CHEBI:16300 kegg.compound:C00620
  species ENZ_278825_Cell in compart_Cell = 1; ENZ_278825_Cell is "phosphoglucomutase(Enzyme) wildtype PGM3";
  species ENZ_278799_Cell in compart_Cell = 1; ENZ_278799_Cell is "phosphoglucomutase(Enzyme) wildtype PGM1";
  species ENZ_278803_Cell in compart_Cell = 1; ENZ_278803_Cell is "phosphoglucomutase(Enzyme) wildtype PGM2";
  species SPC_2789_Cell in compart_Cell = 1; SPC_2789_Cell is "Melibiose";  // CHEBI:28053 kegg.compound:C05402
  species SPC_1407_Cell in compart_Cell = 1; SPC_1407_Cell is "D-Glucose";  // CHEBI:4167 CHEBI:17634 kegg.compound:C00031
  species ENZ_273122_Cell in compart_Cell = 1; ENZ_273122_Cell is "alpha-galactosidase(Enzyme) wildtype";
  species ENZ_273132_Cell in compart_Cell = 1; ENZ_273132_Cell is "alpha-galactosidase(Enzyme) wildtype treated with neuraminidase";
  species ENZ_273117_Cell in compart_Cell = 1; ENZ_273117_Cell is "alpha-galactosidase(Enzyme) wildtype";
  species ENZ_273127_Cell in compart_Cell = 1; ENZ_273127_Cell is "alpha-galactosidase(Enzyme) wildtype treated with neuraminidase";
  species ENZ_278724_Cell in compart_Cell = 1; ENZ_278724_Cell is "phosphoglucomutase(Enzyme) wildtype PGM1";
  species ENZ_278720_Cell in compart_Cell = 1; ENZ_278720_Cell is "phosphoglucomutase(Enzyme) wildtype PGM1";
  species ENZ_278762_Cell in compart_Cell = 1; ENZ_278762_Cell is "phosphoglucomutase(Enzyme) wildtype PGM3";
  species ENZ_279070_Cell in compart_Cell = 1; ENZ_279070_Cell is "alpha-galactosidase(Enzyme) wildtype";
  species ENZ_279075_Cell in compart_Cell = 1; ENZ_279075_Cell is "alpha-galactosidase(Enzyme) wildtype";
  species ENZ_273052_Cell in compart_Cell = 1; ENZ_273052_Cell is "alpha-galactosidase(Enzyme) wildtype";
  species ENZ_275449_Cell in compart_Cell = 1; ENZ_275449_Cell is "alpha-galactosidase(Enzyme) wildtype";
  species ENZ_275473_Cell in compart_Cell = 1; ENZ_275473_Cell is "alpha-galactosidase(Enzyme) wildtype";
  species SPC_28666_Cell in compart_Cell = 1; SPC_28666_Cell is "1-Deoxygalactonojirimycin";
  species ENZ_278732_Cell in compart_Cell = 1; ENZ_278732_Cell is "phosphoglucomutase(Enzyme) wildtype PGM1";
  species ENZ_278751_Cell in compart_Cell = 1; ENZ_278751_Cell is "phosphoglucomutase(Enzyme) wildtype PGM3";
  species ENZ_278759_Cell in compart_Cell = 1; ENZ_278759_Cell is "phosphoglucomutase(Enzyme) wildtype PGM3";
  species ENZ_278736_Cell in compart_Cell = 1; ENZ_278736_Cell is "phosphoglucomutase(Enzyme) wildtype PGM2";
  species ENZ_278744_Cell in compart_Cell = 1; ENZ_278744_Cell is "phosphoglucomutase(Enzyme) wildtype PGM2";
  species ENZ_278755_Cell in compart_Cell = 1; ENZ_278755_Cell is "phosphoglucomutase(Enzyme) wildtype PGM3";
  species ENZ_278728_Cell in compart_Cell = 1; ENZ_278728_Cell is "phosphoglucomutase(Enzyme) wildtype PGM1";
  species ENZ_278740_Cell in compart_Cell = 1; ENZ_278740_Cell is "phosphoglucomutase(Enzyme) wildtype PGM2";
  species ENZ_278747_Cell in compart_Cell = 1; ENZ_278747_Cell is "phosphoglucomutase(Enzyme) wildtype PGM2";
  species ENZ_279657_Cell in compart_Cell = 1; ENZ_279657_Cell is "alpha-galactosidase(Enzyme) wildtype";
  species ENZ_279662_Cell in compart_Cell = 1; ENZ_279662_Cell is "alpha-galactosidase(Enzyme) wildtype";

  // Reactions:
  REAC_0: SPC_34_Cell + SPC_1661_Cell -> SPC_35_Cell + SPC_1381_Cell; KL_26290(SPC_1661_Cell, REAC_0_Km_SPC_1661_Cell, kcat_Km_SPC_1661_Cell, REAC_0_kcat, ENZ_148448_Cell);  // modifiers: ENZ_148448_Cell; isVersionOf ec-code:2.7.1.6; kegg.reaction:R01092; hasTaxon taxonomy:9606; sabiork.reaction:1354
    REAC_0_Km_SPC_1661_Cell = 970 microM; kcat_Km_SPC_1661_Cell = 8900 Mwedgeoneswedgeone; REAC_0_kcat = 8.7 swedgeone;
  REAC_1: SPC_1661_Cell + SPC_34_Cell -> SPC_35_Cell + SPC_1381_Cell; KL_26291(Km_SPC_34_Cell, kcat_Km_SPC_34_Cell, REAC_1_kcat, ENZ_148453_Cell, SPC_34_Cell);  // modifiers: ENZ_148453_Cell; isVersionOf ec-code:2.7.1.6; kegg.reaction:R01092; hasTaxon taxonomy:9606; sabiork.reaction:1354
    Km_SPC_34_Cell = 34; kcat_Km_SPC_34_Cell = 260000; REAC_1_kcat = 8.7;
  REAC_2: SPC_39_Cell + SPC_1262_Cell + SPC_1661_Cell -> SPC_1263_Cell + SPC_2311_Cell; KL_44091(SPC_1262_Cell, REAC_2_Km_SPC_1661_Cell);  // modifiers: ENZ_250106_Cell; isVersionOf ec-code:1.1.1.2; hasTaxon taxonomy:9606; sabiork.reaction:1357
    REAC_2_Km_SPC_1661_Cell = 543 mM;
  REAC_3: SPC_34_Cell + SPC_1661_Cell -> SPC_35_Cell + SPC_1381_Cell; KL_45367(REAC_3_Act, REAC_3_Km_SPC_1661_Cell);  // modifiers: ENZ_257447_Cell; isVersionOf ec-code:2.7.1.6; kegg.reaction:R01092; hasTaxon taxonomy:9606; sabiork.reaction:1354
    REAC_3_Act = 0.652 Udivmg; REAC_3_Km_SPC_1661_Cell = 436;
  REAC_4: SPC_3919_Cell -> SPC_3918_Cell; KL_45393(ENZ_257582_Cell, Km_SPC_3919_Cell, REAC_4_kcat, kcat_Km_SPC_3919_Cell, SPC_3919_Cell);  // modifiers: ENZ_257582_Cell; isVersionOf ec-code:5.1.3.2; kegg.reaction:R00291; hasTaxon taxonomy:9606; sabiork.reaction:70
    Km_SPC_3919_Cell = 69; REAC_4_kcat = 36; kcat_Km_SPC_3919_Cell = 520000;
  REAC_5: SPC_1283_Cell -> SPC_1277_Cell; KL_46263(REAC_5_Act, SPC_1283_Cell, REAC_5_Vmax, SPC_37_Cell, REAC_5_Km_SPC_1283_Cell);  // modifiers: ENZ_262669_Cell, SPC_37_Cell; isVersionOf ec-code:5.1.3.2; kegg.reaction:R00291; hasTaxon taxonomy:9606; sabiork.reaction:8974
    REAC_5_Act = 265 micromoldivminmg; REAC_5_Km_SPC_1283_Cell = 0.23 mM;
  REAC_6: SPC_1283_Cell -> SPC_1277_Cell; KL_46260(REAC_6_Km_SPC_1283_Cell, SPC_37_Cell, SPC_1283_Cell, REAC_6_Vmax);  // modifiers: ENZ_262657_Cell, SPC_37_Cell; isVersionOf ec-code:5.1.3.2; kegg.reaction:R00291; hasTaxon taxonomy:9606; sabiork.reaction:8974
    REAC_6_Km_SPC_1283_Cell = 0.12 mM;
  REAC_7: SPC_40_Cell + SPC_28371_Cell -> SPC_90_Cell + SPC_6439_Cell; KL_46560(REAC_7_Vmax, REAC_7_Km_SPC_28371_Cell, SPC_28371_Cell);  // modifiers: ENZ_264446_Cell; isVersionOf ec-code:3.2.1.22; hasTaxon taxonomy:9606; sabiork.reaction:13100
    REAC_7_Vmax = 34; REAC_7_Km_SPC_28371_Cell = 2.2 mM;
  REAC_8: SPC_40_Cell + SPC_28371_Cell -> SPC_6439_Cell + SPC_90_Cell; KL_47202(REAC_8_Vmax, SPC_28371_Cell, REAC_8_Km_SPC_28371_Cell);  // modifiers: ENZ_268279_Cell; isVersionOf ec-code:3.2.1.22; hasTaxon taxonomy:9606; sabiork.reaction:13100
    REAC_8_Km_SPC_28371_Cell = 13.1 mM;
  REAC_9: SPC_40_Cell + SPC_28371_Cell -> SPC_90_Cell + SPC_6439_Cell; KL_47201(SPC_28371_Cell, REAC_9_Vmax, REAC_9_Km_SPC_28371_Cell);  // modifiers: ENZ_268274_Cell; isVersionOf ec-code:3.2.1.22; hasTaxon taxonomy:9606; sabiork.reaction:13100
    REAC_9_Km_SPC_28371_Cell = 1.55 mM;
  REAC_10: SPC_1661_cytosol + SPC_34_cytosol -> SPC_35_cytosol + SPC_1381_cytosol; KL_14785(ENZ_76988_cytosol, SPC_1661_cytosol, Km_SPC_1661_cytosol, REAC_10_kcat, kcat_Km_SPC_1661_cytosol);  // modifiers: ENZ_76988_cytosol; isVersionOf ec-code:2.7.1.6; kegg.reaction:R01092; hasTaxon taxonomy:9606; sabiork.reaction:1354
    Km_SPC_1661_cytosol = 970; REAC_10_kcat = 8.7; kcat_Km_SPC_1661_cytosol = 8900;
  REAC_11: SPC_1661_cytosol + SPC_34_cytosol -> SPC_35_cytosol + SPC_1381_cytosol; KL_14792(kcat_Km_SPC_34_cytosol, REAC_11_kcat, ENZ_77023_cytosol, SPC_34_cytosol, Km_SPC_34_cytosol);  // modifiers: ENZ_77023_cytosol; isVersionOf ec-code:2.7.1.6; kegg.reaction:R01092; hasTaxon taxonomy:9606; sabiork.reaction:1354
    kcat_Km_SPC_34_cytosol = 260000; REAC_11_kcat = 8.7; Km_SPC_34_cytosol = 34;
  REAC_12: SPC_1381_Cell + SPC_3918_Cell -> SPC_1450_Cell + SPC_3919_Cell; KL_33647(Km_SPC_3918_Cell, kcat_Km_SPC_3918_Cell, REAC_12_Activity, SPC_3918_Cell, SPC_1381_Cell);  // modifiers: ENZ_190147_Cell; isVersionOf ec-code:2.7.7.12; kegg.reaction:R00955; hasTaxon taxonomy:9606; sabiork.reaction:1268
    Km_SPC_3918_Cell = 0.21 mM; kcat_Km_SPC_3918_Cell = 420000; REAC_12_Activity = 122;
  REAC_13: SPC_1381_Cell + SPC_3918_Cell -> SPC_1450_Cell + SPC_3919_Cell; KL_33653(Km_SPC_1381_Cell, kcat_Km_SPC_1381_Cell, SPC_1381_Cell, REAC_13_Activity, SPC_3918_Cell);  // modifiers: ENZ_190177_Cell; isVersionOf ec-code:2.7.7.12; kegg.reaction:R00955; hasTaxon taxonomy:9606; sabiork.reaction:1268
    Km_SPC_1381_Cell = 0.57 mM; kcat_Km_SPC_1381_Cell = 140000; REAC_13_Activity = 122;
  REAC_14: SPC_40_lysosome + SPC_28371_lysosome -> SPC_90_lysosome + SPC_6439_lysosome; KL_50494(Ki_SPC_5010_lysosome);  // modifiers: ENZ_286864_lysosome, SPC_5010_lysosome; isVersionOf ec-code:3.2.1.22; hasTaxon taxonomy:9606; sabiork.reaction:13100
    Ki_SPC_5010_lysosome = 0.29 M;
  REAC_15: SPC_28371_lysosome + SPC_40_lysosome -> SPC_90_lysosome + SPC_6439_lysosome; KL_50491(SPC_28371_lysosome, ENZ_286848_lysosome, REAC_15_Km_SPC_28371_lysosome, REAC_15_Vmax);  // modifiers: ENZ_286848_lysosome; isVersionOf ec-code:3.2.1.22; hasTaxon taxonomy:9606; sabiork.reaction:13100
    REAC_15_Km_SPC_28371_lysosome = 1.9 mM; REAC_15_Vmax = 1250 Udivml;
  REAC_16: SPC_40_lysosome + SPC_28371_lysosome -> SPC_90_lysosome + SPC_6439_lysosome; KL_50493(REAC_16_Km_SPC_28371_lysosome, REAC_16_Vmax, SPC_28371_lysosome);  // modifiers: ENZ_286858_lysosome; isVersionOf ec-code:3.2.1.22; hasTaxon taxonomy:9606; sabiork.reaction:13100
    REAC_16_Km_SPC_28371_lysosome = 3 mM;
  REAC_17: SPC_40_lysosome + SPC_28371_lysosome -> SPC_90_lysosome + SPC_6439_lysosome; KL_50492(SPC_28371_lysosome, REAC_17_Vmax, REAC_17_Km_SPC_28371_lysosome);  // modifiers: ENZ_286853_lysosome; isVersionOf ec-code:3.2.1.22; hasTaxon taxonomy:9606; sabiork.reaction:13100
    REAC_17_Km_SPC_28371_lysosome = 2.6 mM;
  REAC_18: SPC_40_Cell + SPC_28371_Cell -> SPC_90_Cell + SPC_6439_Cell; KL_48027(SPC_28371_Cell, REAC_18_Vmax, REAC_18_Km_SPC_28371_Cell);  // modifiers: ENZ_273087_Cell; isVersionOf ec-code:3.2.1.49; hasTaxon taxonomy:9606; sabiork.reaction:13100
    REAC_18_Vmax = 18.7; REAC_18_Km_SPC_28371_Cell = 6.8 mM;
  REAC_19: SPC_1298_Cell -> SPC_24_Cell; KL_49017(REAC_19_Ki_SPC_6561_Cell, SPC_1452_Cell, SPC_6561_Cell);  // modifiers: SPC_1452_Cell, ENZ_278816_Cell, SPC_6561_Cell; isVersionOf ec-code:5.4.2.2; kegg.reaction:R00959; hasTaxon taxonomy:9606; sabiork.reaction:9261
    REAC_19_Ki_SPC_6561_Cell = 380;
  REAC_20: SPC_1298_Cell -> SPC_24_Cell; KL_49018(SPC_6561_Cell, SPC_1452_Cell, REAC_20_Ki_SPC_6561_Cell);  // modifiers: SPC_6561_Cell, SPC_1452_Cell, ENZ_278821_Cell; isVersionOf ec-code:5.4.2.2; kegg.reaction:R00959; hasTaxon taxonomy:9606; sabiork.reaction:9261
    REAC_20_Ki_SPC_6561_Cell = 300;
  REAC_21: SPC_1298_Cell -> SPC_24_Cell; KL_49019(REAC_21_Ki_SPC_1337_Cell, SPC_1337_Cell, SPC_1298_Cell);  // modifiers: SPC_1337_Cell, ENZ_278825_Cell; isVersionOf ec-code:5.4.2.2; kegg.reaction:R00959; hasTaxon taxonomy:9606; sabiork.reaction:9261
    REAC_21_Ki_SPC_1337_Cell = 27000;
  REAC_22: SPC_1298_Cell -> SPC_24_Cell; KL_49013(SPC_1298_Cell, REAC_22_Ki_SPC_1337_Cell, SPC_1337_Cell);  // modifiers: ENZ_278799_Cell, SPC_1337_Cell; isVersionOf ec-code:5.4.2.2; kegg.reaction:R00959; hasTaxon taxonomy:9606; sabiork.reaction:9261
    REAC_22_Ki_SPC_1337_Cell = 25000;
  REAC_23: SPC_1298_Cell -> SPC_24_Cell; KL_49014(SPC_1298_Cell, SPC_1337_Cell, REAC_23_Ki_SPC_1337_Cell);  // modifiers: ENZ_278803_Cell, SPC_1337_Cell; isVersionOf ec-code:5.4.2.2; kegg.reaction:R00959; hasTaxon taxonomy:9606; sabiork.reaction:9261
    REAC_23_Ki_SPC_1337_Cell = 390;
  REAC_24: SPC_40_Cell + SPC_2789_Cell -> SPC_1407_Cell + SPC_1661_Cell; KL_48034(SPC_2789_Cell, REAC_24_Km_SPC_2789_Cell);  // modifiers: ENZ_273122_Cell; isVersionOf ec-code:3.2.1.22; kegg.reaction:R01101; hasTaxon taxonomy:9606; sabiork.reaction:1363
    REAC_24_Km_SPC_2789_Cell = 40.6 mM;
  REAC_25: SPC_40_Cell + SPC_2789_Cell -> SPC_1407_Cell + SPC_1661_Cell; KL_48036(REAC_25_Km_SPC_2789_Cell, SPC_2789_Cell);  // modifiers: ENZ_273132_Cell; isVersionOf ec-code:3.2.1.22; kegg.reaction:R01101; hasTaxon taxonomy:9606; sabiork.reaction:1363
    REAC_25_Km_SPC_2789_Cell = 37.1 mM;
  REAC_26: SPC_40_Cell + SPC_28371_Cell -> SPC_90_Cell + SPC_6439_Cell; KL_48033(REAC_26_Km_SPC_28371_Cell, SPC_28371_Cell, REAC_26_Vmax);  // modifiers: ENZ_273117_Cell; isVersionOf ec-code:3.2.1.22; hasTaxon taxonomy:9606; sabiork.reaction:13100
    REAC_26_Km_SPC_28371_Cell = 3.4 mM;
  REAC_27: SPC_28371_Cell + SPC_40_Cell -> SPC_90_Cell + SPC_6439_Cell; KL_48035(SPC_28371_Cell, REAC_27_Km_SPC_28371_Cell);  // modifiers: ENZ_273127_Cell; isVersionOf ec-code:3.2.1.22; hasTaxon taxonomy:9606; sabiork.reaction:13100
    REAC_27_Km_SPC_28371_Cell = 2.3 mM;
  REAC_28: SPC_1298_Cell -> SPC_24_Cell; KL_48994(REAC_28_Km_SPC_1298_Cell, SPC_1452_Cell);  // modifiers: SPC_1452_Cell, ENZ_278724_Cell; isVersionOf ec-code:5.4.2.2; kegg.reaction:R00959; hasTaxon taxonomy:9606; sabiork.reaction:9261
    REAC_28_Km_SPC_1298_Cell = 53;
  REAC_29: SPC_1298_Cell -> SPC_24_Cell; KL_48993(REAC_29_Km_SPC_1298_Cell);  // modifiers: ENZ_278720_Cell; isVersionOf ec-code:5.4.2.2; kegg.reaction:R00959; hasTaxon taxonomy:9606; sabiork.reaction:9261
    REAC_29_Km_SPC_1298_Cell = 49;
  REAC_30: SPC_1298_Cell -> SPC_24_Cell; KL_49004(REAC_30_Km_SPC_1298_Cell);  // modifiers: ENZ_278762_Cell; isVersionOf ec-code:5.4.2.2; kegg.reaction:R00959; hasTaxon taxonomy:9606; sabiork.reaction:9261
    REAC_30_Km_SPC_1298_Cell = 31000;
  REAC_31: SPC_40_Cell + SPC_28371_Cell -> SPC_90_Cell + SPC_6439_Cell; KL_49063(SPC_28371_Cell, REAC_31_Km_SPC_28371_Cell);  // modifiers: ENZ_279070_Cell; isVersionOf ec-code:3.2.1.22; hasTaxon taxonomy:9606; sabiork.reaction:13100
    REAC_31_Km_SPC_28371_Cell = 4.9 mM;
  REAC_32: SPC_40_Cell + SPC_28371_Cell -> SPC_6439_Cell + SPC_90_Cell; KL_49064(SPC_28371_Cell, REAC_32_Km_SPC_28371_Cell);  // modifiers: ENZ_279075_Cell; isVersionOf ec-code:3.2.1.22; hasTaxon taxonomy:9606; sabiork.reaction:13100
    REAC_32_Km_SPC_28371_Cell = 19.1 mM;
  REAC_33: SPC_28371_Cell + SPC_40_Cell -> SPC_90_Cell + SPC_6439_Cell; KL_48020(REAC_33_Km_SPC_28371_Cell, REAC_33_Vmax, SPC_28371_Cell);  // modifiers: ENZ_273052_Cell; isVersionOf ec-code:3.2.1.22; hasTaxon taxonomy:9606; sabiork.reaction:13100
    REAC_33_Km_SPC_28371_Cell = 2.8 mM; REAC_33_Vmax = 28.7;
  REAC_34: SPC_40_Cell + SPC_28371_Cell -> SPC_6439_Cell + SPC_90_Cell; KL_48427(REAC_34_Vmax, REAC_34_Km_SPC_28371_Cell, SPC_28371_Cell, Spec_Act);  // modifiers: ENZ_275449_Cell; isVersionOf ec-code:3.2.1.22; hasTaxon taxonomy:9606; sabiork.reaction:13100
    REAC_34_Vmax = 2300000 nmoldivhmg; REAC_34_Km_SPC_28371_Cell = 2.3 mM; Spec_Act = 1700000;
  REAC_35: SPC_28371_Cell + SPC_40_Cell -> SPC_90_Cell + SPC_6439_Cell; KL_48431(SPC_28371_Cell, IC_50_SPC_28666_Cell);  // modifiers: ENZ_275473_Cell, SPC_28666_Cell; isVersionOf ec-code:3.2.1.22; hasTaxon taxonomy:9606; sabiork.reaction:13100
    IC_50_SPC_28666_Cell = 59 nM;
  REAC_36: SPC_1298_Cell -> SPC_24_Cell; KL_48996(REAC_36_Km_SPC_1298_Cell, SPC_1452_Cell);  // modifiers: ENZ_278732_Cell, SPC_1452_Cell; isVersionOf ec-code:5.4.2.2; kegg.reaction:R00959; hasTaxon taxonomy:9606; sabiork.reaction:9261
    REAC_36_Km_SPC_1298_Cell = 34;
  REAC_37: SPC_1298_Cell -> SPC_24_Cell; KL_49001(REAC_37_Km_SPC_1298_Cell, SPC_1452_Cell);  // modifiers: ENZ_278751_Cell, SPC_1452_Cell; isVersionOf ec-code:5.4.2.2; kegg.reaction:R00959; hasTaxon taxonomy:9606; sabiork.reaction:9261
    REAC_37_Km_SPC_1298_Cell = 18000;
  REAC_38: SPC_1298_Cell -> SPC_24_Cell; KL_49003(REAC_38_Km_SPC_1298_Cell, SPC_1452_Cell);  // modifiers: ENZ_278759_Cell, SPC_1452_Cell; isVersionOf ec-code:5.4.2.2; kegg.reaction:R00959; hasTaxon taxonomy:9606; sabiork.reaction:9261
    REAC_38_Km_SPC_1298_Cell = 17000;
  REAC_39: SPC_1298_Cell -> SPC_24_Cell; KL_48997(SPC_1452_Cell, REAC_39_Km_SPC_1298_Cell);  // modifiers: ENZ_278736_Cell, SPC_1452_Cell; isVersionOf ec-code:5.4.2.2; kegg.reaction:R00959; hasTaxon taxonomy:9606; sabiork.reaction:9261
    REAC_39_Km_SPC_1298_Cell = 19;
  REAC_40: SPC_1298_Cell -> SPC_24_Cell; KL_48999(SPC_1452_Cell, REAC_40_Km_SPC_1298_Cell);  // modifiers: ENZ_278744_Cell, SPC_1452_Cell; isVersionOf ec-code:5.4.2.2; kegg.reaction:R00959; hasTaxon taxonomy:9606; sabiork.reaction:9261
    REAC_40_Km_SPC_1298_Cell = 490;
  REAC_41: SPC_1298_Cell -> SPC_24_Cell; KL_49002(SPC_1452_Cell, REAC_41_Km_SPC_1298_Cell);  // modifiers: ENZ_278755_Cell, SPC_1452_Cell; isVersionOf ec-code:5.4.2.2; kegg.reaction:R00959; hasTaxon taxonomy:9606; sabiork.reaction:9261
    REAC_41_Km_SPC_1298_Cell = 36000;
  REAC_42: SPC_1298_Cell -> SPC_24_Cell; KL_48995(REAC_42_Km_SPC_1298_Cell, SPC_1452_Cell);  // modifiers: ENZ_278728_Cell, SPC_1452_Cell; isVersionOf ec-code:5.4.2.2; kegg.reaction:R00959; hasTaxon taxonomy:9606; sabiork.reaction:9261
    REAC_42_Km_SPC_1298_Cell = 45;
  REAC_43: SPC_1298_Cell -> SPC_24_Cell; KL_48998(SPC_1452_Cell, REAC_43_Km_SPC_1298_Cell);  // modifiers: ENZ_278740_Cell, SPC_1452_Cell; isVersionOf ec-code:5.4.2.2; kegg.reaction:R00959; hasTaxon taxonomy:9606; sabiork.reaction:9261
    REAC_43_Km_SPC_1298_Cell = 110;
  REAC_44: SPC_1298_Cell -> SPC_24_Cell; KL_49000(REAC_44_Km_SPC_1298_Cell);  // modifiers: ENZ_278747_Cell; isVersionOf ec-code:5.4.2.2; kegg.reaction:R00959; hasTaxon taxonomy:9606; sabiork.reaction:9261
    REAC_44_Km_SPC_1298_Cell = 1600;
  REAC_45: SPC_40_Cell + SPC_28371_Cell -> SPC_90_Cell + SPC_6439_Cell; KL_49159(REAC_45_Vmax, SPC_28371_Cell, REAC_45_Km_SPC_28371_Cell);  // modifiers: ENZ_279657_Cell; isVersionOf ec-code:3.2.1.22; hasTaxon taxonomy:9606; sabiork.reaction:13100
    REAC_45_Km_SPC_28371_Cell = 0.004 M;
  REAC_46: SPC_40_Cell + SPC_28371_Cell -> SPC_90_Cell + SPC_6439_Cell; KL_49160(SPC_28371_Cell, REAC_46_Vmax, REAC_46_Km_SPC_28371_Cell);  // modifiers: ENZ_279662_Cell; isVersionOf ec-code:3.2.1.22; hasTaxon taxonomy:9606; sabiork.reaction:13100
    REAC_46_Km_SPC_28371_Cell = 0.004 M;

  // Unit definitions:
  unit microM = 1e-6 mole / litre; microM is "µM";
  unit Mwedgeoneswedgeone = litre / (mole * second); Mwedgeoneswedgeone is "M^(-1)*s^(-1)";
  unit swedgeone = 1 / second; swedgeone is "s^(-1)";
  unit mM = 1e-3 mole / litre;
  unit Udivmg = 1.6667e-8 katal / (1e-3 gram); Udivmg is "U/mg";
  unit micromoldivminmg = 1e-6 mole / (1e-3 gram * 60 second); micromoldivminmg is "µmol/(min*mg)";
  unit M = mole / litre;
  unit Udivml = 1.6667e-8 katal / (1e-3 litre); Udivml is "U/ml";
  unit nmoldivhmg = 1e-9 mole / (1e-3 gram * 3600 second); nmoldivhmg is "nmol/(h*mg)";
  unit nM = 1e-9 mole / litre;
end
