// SBML level 3 version 1

function KL_14792(E, kcat, A, kcat_Km, Km)
  E*kcat*A/(Km + A);
end

model SABIOmdl21Jun2016423()
  // This model has been created with the help of the SABIO-RK Database (http://sabio.h-its.org/) (c) 2005-2016 HITS gGmbH http://www.h-its.org
  // To cite SABIO-RK Database, please use "http://www.ncbi.nlm.nih.gov/pubmed/22102587"
  // SABIO-RK - database for biochemical reaction kinetics. Wittig U, Kania R, Golebiewski M, Rey M, Shi L, Jong L, Algaa E, Weidemann A, Sauer-Danzwith H, Mir S, Krebs O, Bittkowski M, Wetsch E, Rojas I, Mueller W. Nucleic Acids Res. 2012;40(Database issue)790-6

  // Compartments:
  compartment compart_cytosol;

  // Species:
  species SPC_1661_cytosol in compart_cytosol = 1; SPC_1661_cytosol is "D-Galactose";  // CHEBI:4139 CHEBI:12936 kegg.compound:C00124
  species SPC_34_cytosol in compart_cytosol = 1; SPC_34_cytosol is "ATP";  // CHEBI:15422 CHEBI:30616 kegg.compound:C00002
  species SPC_35_cytosol in compart_cytosol = 1; SPC_35_cytosol is "ADP";  // CHEBI:16761 kegg.compound:C00008
  species SPC_1381_cytosol in compart_cytosol = 1; SPC_1381_cytosol is "alpha-D-Galactose 1-phosphate";  // CHEBI:17973 kegg.compound:C00446
  species ENZ_77023_cytosol in compart_cytosol = 1; ENZ_77023_cytosol is "galactokinase(Enzyme) wildtype His-tagged";  // uniprot:P51570

  // Reactions:
  REAC_0: SPC_1661_cytosol + SPC_34_cytosol -> SPC_35_cytosol + SPC_1381_cytosol; KL_14792(ENZ_77023_cytosol, REAC_0_kcat, SPC_34_cytosol, REAC_0_kcat_Km_SPC_34_cytosol, REAC_0_Km_SPC_34_cytosol);  // modifiers: ENZ_77023_cytosol; isVersionOf ec-code:2.7.1.6; kegg.reaction:R01092; hasTaxon taxonomy:9606; sabiork.reaction:1354
    REAC_0_kcat = 8.7 swedgeone; REAC_0_kcat_Km_SPC_34_cytosol = 260000 Mwedgeoneswedgeone; REAC_0_Km_SPC_34_cytosol = 3.4e-5 M;

  // Unit definitions:
  unit swedgeone = 1 / second; swedgeone is "s^(-1)";
  unit Mwedgeoneswedgeone = litre / (mole * second); Mwedgeoneswedgeone is "M^(-1)*s^(-1)";
  unit M = mole / litre;
end
